<neuroml xmlns="http://www.neuroml.org/schema/neuroml2"  xmlns:xs="http://www.w3.org/2001/XMLSchema" xmlns:xsi="http://www.w3.org/2001/XMLSchema-instance" xsi:schemaLocation="http://www.neuroml.org/schema/neuroml2 https://raw.github.com/NeuroML/NeuroML2/development/Schemas/NeuroML2/NeuroML_v2beta5.xsd" id="IClamp_GenericNeuronCell">
    <notes>Generated by NeuroMLlite v0.1.8
    Generated network: IClamp_GenericNeuronCell
    Generation seed: 1234
    NeuroMLlite parameters:
        stim_amp = 26pA</notes>
    <include href="/home/padraig/c302/examples/parametersweep/GenericNeuronCell.cell.nml"/>
    <pulseGenerator id="iclamp_0" delay="500ms" duration="2000ms" amplitude="26pA"/>
    <network id="IClamp_GenericNeuronCell" type="networkWithTemperature" temperature="34.0degC">
        <notes>A network model: IClamp_GenericNeuronCell</notes>
        <population id="pop_GenericNeuronCell" component="GenericNeuronCell" size="1" type="populationList">
            <property tag="region" value="Worm"/>
            <instance id="0">
                <location x="966.453535692138757" y="44.073259917535268" z="7.491470058587191"/>
            </instance>
        </population>
        <inputList id="Stim_iclamp_0" population="pop_GenericNeuronCell" component="iclamp_0">
            <input id="0" target="../pop_GenericNeuronCell/0/GenericNeuronCell" destination="synapses"/>
        </inputList>
    </network>
</neuroml>
